#
log             nvt.log

# set up simulation
units           real
atom_style      full
boundary        p p p
pair_style      lj/cut/coul/long 12
kspace_style    ewald 0.0001
pair_modify     tail yes
pair_modify     mix arithmetic
special_bonds   amber

bond_style      harmonic
angle_style     harmonic

read_data       nvt.data

neighbor        2.0 bin
neigh_modify    delay 0 every 1 check yes page 1000000 one 20000
timestep        1.0

## create velocity profile
velocity        all zero linear units box
dump            DUMP all custom 2 nvt.dump id type x y z vx vy vz mol mass
thermo_style    custom step vol temp press ke pe etotal enthalpy evdwl ecoul epair ebond eangle edihed eimp emol elong etail lx ly lz xy xz yz density
thermo          1

## thermostat and integrator
#minimize       1e-4 1e-6 10000 10000

fix             NVT all nvt temp 300 300 100.0

restart         50000 restart.nvt.1 restart.nvt.2
run             100

write_restart   restart.nvt
write_data      restart.data
